*Heading
** Job name: Bar_Necking Model name: Model-1
** Generated by: Abaqus/CAE 2020
*Preprint, echo=NO, model=NO, history=NO, contact=NO
**
** PARTS
**
*Part, name=Cylinder
*Node
      1,           0.,   8.89000034,   6.37024117
      2,           0.,   8.89000034,           0.
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*Element, type=C3D8
   1,  481,  482, 1837, 1819,   19,   20,  230,  229
   2,  482,  483, 1838, 1837,   20,   21,  231,  230
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*Nset, nset=Set-1, generate
    1,  4879,     1
*Elset, elset=Set-1, generate
    1,  3960,     1
** Section: Section-1
*Solid Section, elset=Set-1, material=Steel
,
*End Part
**
**
** ASSEMBLY
**
*Assembly, name=Assembly
**
*Instance, name=Cylinder-1, part=Cylinder
*End Instance
**
*Nset, nset=Set-1, instance=Cylinder-1
    7,    8,    9,  137,  138,  139
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*Elset, elset=Set-1, instance=Cylinder-1
 910
*Nset, nset=Set-2, instance=Cylinder-1
    3,    4,    6,   83,   84,   85
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*Nset, nset=Set-3, instance=Cylinder-1
    1,    2,    3,    4,    7,    8
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*Nset, nset=Set-4, instance=Cylinder-1
    2,    3,    5,    6,    7,    9
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*End Assembly
*Amplitude, name=Amp-1
 0., 0., 0.001, 1.
**
** MATERIALS
**
*Material, name=Steel
*Conductivity
34.0,
*Density
 7.83e-09,
*Elastic
206000., 0.3
*Expansion
 1.23e-05,
*Inelastic Heat Fraction
 0.9,
*Plastic, hardening=JOHNSON COOK
806.,  614., 0.168,   1.1, 1540.,  20.
*Rate Dependent, type=JOHNSON COOK
 0.0089,1.
*Specific Heat
4.6e+08,
**
** PREDEFINED FIELDS
**
** Name: Predefined Field-1   Type: Temperature
*Initial Conditions, type=TEMPERATURE
Cylinder-1.Set-1, 20.
** ----------------------------------------------------------------
**
** STEP: Step-1
**
*Step, name=Step-1, nlgeom=YES
*Dynamic, Explicit, adiabatic, element by element
, 0.001
*Bulk Viscosity
0.06, 1.2
**
** BOUNDARY CONDITIONS
**
** Name: BOT Type: Displacement/Rotation
*Boundary
Set-2, 2, 2
** Name: LOAD Type: Displacement/Rotation
*Boundary, amplitude=Amp-1
Set-1, 2, 2, 7.
** Name: SYMX Type: Displacement/Rotation
*Boundary
Set-3, 1, 1
** Name: SYMZ Type: Displacement/Rotation
*Boundary
Set-4, 3, 3
**
** OUTPUT REQUESTS
**
*Restart, write, number interval=1, time marks=NO
**
** FIELD OUTPUT: F-Output-1
**
*Output, field
*Node Output
A, RF, U, V
*Element Output, directions=YES
ER, ERV, EVF, LE, PE, PEEQ, PEEQVAVG, PEVAVG, S, SVAVG, TEMP, TEMPMAVG, DENSITY
*Contact Output
CSTRESS,
**
** HISTORY OUTPUT: H-Output-1
**
*Output, history
*Energy Output
ALLAE, ALLCD, ALLDMD, ALLFD, ALLIE, ALLKE, ALLPD, ALLSE, ALLVD, ALLWK, ETOTAL
**
** HISTORY OUTPUT: H-Output-2
**
*Output, history, time interval=1e-5
*Element Output, elset=Set-1
MISES, PEEQ, TEMP, DENSITY
*Energy output
ALLKE
*Incrementation Output
DT
*End Step
